Given
π_1 := 0.4
λ := 0.5
π_2 := 0.5
P_2000 == 0
P_1000 == 0
P_2100 == P_1000 + P_1100*π_1 + P_1001*(1 - π_2) + P_1101*π_1*(1 - π_2)
P_1100 == P_2100*π_1 + P_2101*π_1*(1 - π_2)
P_2101 == P_1100*(1 - π_1) + P_1011*(1 - π_2) + P_1101*((1 - π_1)*(1 - π_2) + π_1*π_2) + P_1001*π_2 + P_1111*π_1*(1 - π_2)
P_1001 == P_2100*(1 - π_1) + P_2101*(1 - π_1)*(1 - π_2)
P_1011 == P_2101*(1 - π_1)*π_2 + P_2111*((1 - π_1)*(1 - π_2))
P_2111 == P_1011*π_2 + P_1101*(1 - π_1)*π_2 + P_1111*((1 - π_1)*(1 - π_2) + π_1*π_2) + P_1121*((1 - π_2)*π_1) + P_1021*(1 - π_2)
P_1101 == P_2111*(1 - π_2)*π_1 + P_2101*π_1*π_2
P_1111 == P_2111*π_1*π_2 + P_2121*((1 - π_2)*π_1)
P_1021 == P_2111*(1 - π_1)*π_2 + P_2121*((1 - π_1)*(1 - π_2) + (1 - π_1)*π_2)
P_2121 == P_1021*π_2 + P_1111*((1 - π_1)*π_2) + P_1121*((1 - π_1)*(1 - π_2) + π_2*π_1 + (1 - π_1)*π_2)
P_1121 == P_2121*π_1*π_2
P_2000 + P_1000 + P_2100 + P_1100 + P_2101 + P_1001 + P_1011 + P_2111 + P_1101 + P_1111 + P_1021 + P_2121 + P_1121 == 1
[
    P_2000;
    P_1000;
    P_2100;
    P_1100;
    P_2101;
    P_1001;
    P_1011;
    P_2111;
    P_1101;
    P_1111;
    P_1021;
    P_2121;
    P_1121
] := Find(P_2000, P_1000, P_2100, P_1100, P_2101, P_1001, P_1011, P_2111, P_1101, P_1111, P_1021, P_2121, P_1121) → [0; 0; 0.112859153763; 0.0865777924981; 0.207170654964; 0.129866688747; 0.0997101929287; 0.125196654798; 0.0664734619525; 0.0359940382545; 0.0704231183241; 0.0547735364743; 0.0109547072949]
A := (1 - π_2)*(P_2101 + P_1001 + P_1011 + P_2111 + P_1101 + P_1111 + P_1021 + P_2121 + P_1121) = 0.400282
Sum_1 := P_1011 + P_1111 + P_1021 + P_1121 + P_1100 + P_1001 + P_1101 = 0.5
Sum_2 := P_2100 + P_1111 + P_2101 + P_1121 + P_1100 + P_2121 + P_1101 + P_2111 = 0.7
P_отк1 := (P_1111 + P_1121 + P_1100 + P_1101)/Sum_1*π_1 = 0.16
P_отк2 := (P_1121 + P_2121)/Sum_2*π_2 = 0.0469487
P_отк := P_отк1 + (1 - P_отк1)*P_отк2 = 0.199437
P_отк := 1 - A/λ = 0.199437
L_оч := P_1011 + P_2111 + P_1111 + 2*(P_1021 + P_2121 + P_1121) = 0.533204
L_c := 2*(P_1011 + P_2111 + P_1111) + 3*(P_1021 + P_2121 + P_1121) + P_2100 + P_1100 + P_1001 + P_2101 + P_1101 = 1.5332
W_оч := L_оч/A = 1.33207
W_c := W_оч + 1/(1 - π_2) + 1/(1 - π_1) = 4.99874
Q := 1 - P_отк = 0.800563
К_общ := P_1101 + P_1111 + P_1121 + P_2121 + P_2111 + P_2101 = 0.500563
К_кан1 := P_1100 + К_общ + P_2100 = 0.7
К_кан2 := P_1021 + P_1011 + К_общ + P_1001 = 0.800563
